*Heading
** Job name: Job-3 Model name: Model-1
** Generated by: Abaqus/CAE 6.14-1
*Preprint, echo=NO, model=NO, history=NO, contact=NO
**
** PARTS
**
*Part, name=FOUNDATION
*Node
      1,           9.,           0.,          10.
      2,           9.,           0.,           9.
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*Element, type=C3D8
1, 42, 46, 45, 37,  1,  2,  3,  4
2, 41, 47, 44, 38, 42, 46, 45, 37
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*Nset, nset=Set-F-B-Y
   1,   2,   3,   4,  22,  23
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*Elset, elset=Set-F-B-Y
   1,  94, 100, 104, 108, 112
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*Nset, nset=Set-F-Z-LINE
   3,   4,  34, 209, 210, 211, 212, 213, 214, 215, 216
*Elset, elset=Set-F-Z-LINE
   1, 171, 175, 179, 183, 187, 191, 195, 199, 203
*Nset, nset=Set-F-YOU-W
   3,   4,   7,   8,  16,  17
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*Elset, elset=Set-F-YOU-W
   1,   2,   3,   4,  13,  14
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*Nset, nset=Set-F-YOU-N
   2,   6,  19,  35,  46,  47
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*Elset, elset=Set-F-YOU-N, generate
 168,  203,    1
*Nset, nset=Set-F-ZHONG-N
   6,  10,  19,  20,  56,  57
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*Elset, elset=Set-F-ZHONG-N, generate
 22,  93,   1
*Nset, nset=Set-F-ZHONG-W
  11,  12,  13,  14,  15,  16
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*Elset, elset=Set-F-ZHONG-W
   5,   6,   7,   8,   9,  10
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*Elset, elset=_PickedSet20, internal, generate
   1,  212,    1
*Nset, nset=Set-FOUNDATION, generate
   1,  474,    1
*Elset, elset=Set-FOUNDATION, generate
   1,  212,    1
*Elset, elset=_Surf-F-D_S5, internal
  86,  87,  88,  89,  90,  91,  92,  93, 132, 133, 134, 135, 212
*Elset, elset=_Surf-F-D_S2, internal, generate
 168,  171,    1
*Elset, elset=_Surf-F-D_S6, internal
 13,
*Surface, type=ELEMENT, name=Surf-F-D
_Surf-F-D_S5, S5
_Surf-F-D_S2, S2
_Surf-F-D_S6, S6
*Elset, elset=_Surf-F-UP_S5, internal, generate
 136,  167,    1
*Surface, type=ELEMENT, name=Surf-F-UP
_Surf-F-UP_S5, S5
*Elset, elset=_Surf-F-N_S1, internal, generate
 100,  135,    1
*Elset, elset=_Surf-F-N_S2, internal, generate
 22,  93,   1
*Elset, elset=_Surf-F-N_S6, internal, generate
 168,  203,    1
*Surface, type=ELEMENT, name=Surf-F-N
_Surf-F-N_S1, S1
_Surf-F-N_S2, S2
_Surf-F-N_S6, S6
*Elset, elset=_Surf-F-W_S2, internal
  13,  14,  15,  16,  17,  18
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*Elset, elset=_Surf-F-W_S1, internal
  5,  6,  7,  8,  9, 10
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*Elset, elset=_Surf-F-W_S4, internal
  94,  95,  96,  97, 168, 169
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*Elset, elset=_Surf-F-W_S5, internal
  1,  2,  3,  4, 13, 14, 15, 16, 17, 18, 19, 20, 21, 98, 99
*Surface, type=ELEMENT, name=Surf-F-W
_Surf-F-W_S2, S2
_Surf-F-W_S1, S1
_Surf-F-W_S4, S4
_Surf-F-W_S5, S5
** Section: Section-2FOUNDATION
*Solid Section, elset=_PickedSet20, material=Material-2FOUNDATION
,
*End Part
**
*Part, name=SOIL
*Node
      1,         110.,          55.,          50.
      2,         110.,           5.,          50.
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*Element, type=C3D8
   1,   206,  1957,  7861,  1619,     1,    77,  1281,   128
   2,  1957,  1958,  7862,  7861,    77,    78,  1282,  1281
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*Nset, nset=Set-T-B-D
    3,    4,    6,    7,    9,   12
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*Elset, elset=Set-T-B-D
   183,   184,   185,   186,   187,   188
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*Nset, nset=Set-T-B-X
    1,    2,    3,    4,   22,   23
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*Elset, elset=Set-T-B-X
     1,     2,     3,     4,     5,     6
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*Nset, nset=Set-T-B-Y
    1,    4,    7,    8,   13,   14
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*Elset, elset=Set-T-B-Y
     1,    15,    29,    43,    57,    71
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*Nset, nset=Set-T-YOU-W
    5,   39,   40,   41,   42,   44
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*Elset, elset=Set-T-YOU-W
  6207,  6208,  6209,  6210,  6211,  6212
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*Nset, nset=Set-T-YOU-N
   11,   14,   73,   75,  319,  320
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*Elset, elset=Set-T-YOU-N, generate
 14869,  15149,      8
*Nset, nset=Set-T-ZHONG-W
    5,   19,   20,   21,   39,   40
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*Elset, elset=Set-T-ZHONG-W
  8237,  8238,  8239,  8240,  8241,  8242
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*Elset, elset=_PickedSet28, internal, generate
     1,  17116,      1
*Elset, elset=_Surf-T-W_S6, internal
 10459, 10473, 10487, 10501, 10515, 10529
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*Elset, elset=_Surf-T-W_S1, internal
 6207, 6208, 6209, 6210, 6211, 6212
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*Elset, elset=_Surf-T-W_S4, internal, generate
 10612,  11158,     14
*Elset, elset=_Surf-T-W_S2, internal, generate
 3193,  3202,     1
*Surface, type=ELEMENT, name=Surf-T-W
_Surf-T-W_S6, S6
_Surf-T-W_S1, S1
_Surf-T-W_S4, S4
_Surf-T-W_S2, S2
*Elset, elset=_Surf-T-D_S2, internal
  8667,  8668,  8669,  8670, 14659
*Elset, elset=_Surf-T-D_S1, internal
 8666, 8883, 8884, 8885, 8886, 8887, 8888, 8889, 8890
*Elset, elset=_Surf-T-D_S4, internal, generate
 8736,  8778,    14
*Surface, type=ELEMENT, name=Surf-T-D
_Surf-T-D_S2, S2
_Surf-T-D_S1, S1
_Surf-T-D_S4, S4
*Elset, elset=_Surf-T-N_S4, internal, generate
 14876,  15156,      8
*Elset, elset=_Surf-T-N_S2, internal, generate
 14869,  14940,      1
*Elset, elset=_Surf-T-N_S6, internal, generate
 14869,  15149,      8
*Surface, type=ELEMENT, name=Surf-T-N
_Surf-T-N_S4, S4
_Surf-T-N_S2, S2
_Surf-T-N_S6, S6
*Elset, elset=_Surf-T-UP_S5, internal
 14933, 14934, 14935, 14936, 14937, 14938
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*Surface, type=ELEMENT, name=Surf-T-UP
_Surf-T-UP_S5, S5
** Section: Section-1SOIL
*Solid Section, elset=_PickedSet28, material=Material-1SOIL
,
*End Part
**
**
** ASSEMBLY
**
*Assembly, name=Assembly
**
*Instance, name=SOIL-1, part=SOIL
*End Instance
**
*Instance, name=FOUNDATION-1, part=FOUNDATION
         50.,           0.,          50.
*End Instance
**
*Node
      1,          55.,           0.,          60.
*Nset, nset=Set-1RF
 1,
*Nset, nset=Set-2, instance=SOIL-1, generate
     1,  19455,      1
*Nset, nset=Set-2, instance=FOUNDATION-1, generate
   1,  474,    1
*Elset, elset=Set-2, instance=SOIL-1, generate
     1,  17116,      1
*Elset, elset=Set-2, instance=FOUNDATION-1, generate
   1,  212,    1
*Nset, nset=Set-3, instance=SOIL-1, generate
     1,  19455,      1
*Nset, nset=Set-3, instance=FOUNDATION-1, generate
   1,  474,    1
*Elset, elset=Set-3, instance=SOIL-1, generate
     1,  17116,      1
*Elset, elset=Set-3, instance=FOUNDATION-1, generate
   1,  212,    1
** Constraint: Constraint-1
*Rigid Body, ref node=Set-1RF, elset=FOUNDATION-1.Set-FOUNDATION
*End Assembly
**
** MATERIALS
**
*Material, name=Material-1SOIL
*Elastic
50000., 0.49
*Mohr Coulomb
0.,0.
*Mohr Coulomb Hardening
50.,0.
*Material, name=Material-2FOUNDATION
*Elastic
 3e+07, 0.15
**
** INTERACTION PROPERTIES
**
*Surface Interaction, name=IntProp-1
1.,
*Friction, slip tolerance=0.005, taumax=50.
 0.5,
*Surface Behavior, pressure-overclosure=HARD
**
** BOUNDARY CONDITIONS
**
** Name: BC-1 Type: Displacement/Rotation
*Boundary
SOIL-1.Set-T-B-D, 1, 1
SOIL-1.Set-T-B-D, 2, 2
SOIL-1.Set-T-B-D, 3, 3
** Name: BC-2 Type: Displacement/Rotation
*Boundary
SOIL-1.Set-T-B-X, 1, 1
** Name: BC-3 Type: Displacement/Rotation
*Boundary
SOIL-1.Set-T-B-Y, 2, 2
** Name: BC-4 Type: Displacement/Rotation
*Boundary
FOUNDATION-1.Set-F-B-Y, 2, 2
**
** PREDEFINED FIELDS
**
** Name: Predefined Field-1   Type: Geostatic stress
*Initial Conditions, type=STRESS, GEOSTATIC
Set-3, 0., 60., -1080., 0., 1., 1.
**
** INTERACTIONS
**
** Interaction: Int-1W
*Contact Pair, interaction=IntProp-1, type=SURFACE TO SURFACE
SOIL-1.Surf-T-W, FOUNDATION-1.Surf-F-W
** Interaction: Int-2N
*Contact Pair, interaction=IntProp-1, type=SURFACE TO SURFACE
SOIL-1.Surf-T-N, FOUNDATION-1.Surf-F-N
** Interaction: Int-3UP
*Contact Pair, interaction=IntProp-1, type=SURFACE TO SURFACE
SOIL-1.Surf-T-UP, FOUNDATION-1.Surf-F-UP
** Interaction: Int-4D
*Contact Pair, interaction=IntProp-1, type=SURFACE TO SURFACE
SOIL-1.Surf-T-D, FOUNDATION-1.Surf-F-D
** ----------------------------------------------------------------
**
** STEP: GEO
**
*Step, name=GEO, nlgeom=NO
*Geostatic
**
** LOADS
**
** Name: Load-1   Type: Body force
*Dload
Set-2, BZ, -18.
**
** OUTPUT REQUESTS
**
*Restart, write, frequency=0
**
** FIELD OUTPUT: F-Output-1
**
*Output, field
*Node Output
RF, RM, U, UR
*Output, history, frequency=0
*End Step
** ----------------------------------------------------------------
**
** STEP: LOAD-V
**
*Step, name=LOAD-V, nlgeom=NO, unsymm=YES
*Static
0.01, 1., 1e-05, 0.02
**
** LOADS
**
** Name: Load-2   Type: Concentrated force
*Cload
Set-1RF, 3, -5418.
**
** OUTPUT REQUESTS
**
*Restart, write, frequency=0
**
** FIELD OUTPUT: F-Output-1
**
*Output, field
*Node Output
RF, RM, U, UR
*Output, history, frequency=0
*End Step
** ----------------------------------------------------------------
**
** STEP: LOAD-DISP
**
*Step, name=LOAD-DISP, nlgeom=NO, unsymm=YES
*Static
0.01, 1., 1e-05, 0.02
**
** BOUNDARY CONDITIONS
**
** Name: BC-5 Type: Displacement/Rotation
*Boundary
Set-1RF, 1, 1, 0.5
Set-1RF, 5, 5, 0.0416667
**
** OUTPUT REQUESTS
**
*Restart, write, frequency=0
**
** FIELD OUTPUT: F-Output-1
**
*Output, field
*Node Output
RF, RM, U, UR
*Output, history, frequency=0
*End Step
